New "Load.LDV_BT_1041838_M1_IJAU07_1001041838_000508" bus1="1001041838.1.2.4" phases=1 conn=Delta model=1 kv=0.220000000 kw=3.5 pf=1 status=variable vmaxpu=1.5 vminpu=0.92
New "Load.LDV_BT_1053304_4_M1_IJAU07_1001053304_001603" bus1="1001053304.1.2.3.4" phases=3 conn=Delta model=1 kv=0.220000000 kw=3.5 pf=1 status=variable vmaxpu=1.5 vminpu=0.92
New "Load.LDV_BT_1081598_M2_IJAU07_1001081598_004464" bus1="1001081598.1.2.3.4" phases=3 conn=Delta model=1 kv=0.220000000 kw=3.5 pf=1 status=variable vmaxpu=1.5 vminpu=0.92
New "Load.TW_BT_1041635_M1_IJAU07_1001041635_000457" bus1="1001041635.1.4" phases=1 conn=Wye model=1 kv=0.220000000 kw=2.0 pf=1 status=variable vmaxpu=1.5 vminpu=0.92
New "Load.TW_BT_3683008_1_M2_IJAU07_1003683008_006133" bus1="1003683008.2.3.4" phases=1 conn=Delta model=1 kv=0.220000000 kw=2.0 pf=1 status=variable vmaxpu=1.5 vminpu=0.92
New "Load.TW_BT_1081983_2_M1_IJAU07_1001081983_004519" bus1="1001081983.2.3.4" phases=1 conn=Delta model=1 kv=0.220000000 kw=2.0 pf=1 status=variable vmaxpu=1.5 vminpu=0.92
New "Load.TW_BT_6301355_14_M2_IJAU07_1006301355_007944" bus1="1006301355.1.2.3.4" phases=3 conn=Delta model=1 kv=0.220000000 kw=2.0 pf=1 status=variable vmaxpu=1.5 vminpu=0.92
