New "Load.LDV_BT_1018052_M1_IJAU11_1001018052_001669" bus1="1001018052.1.4" phases=1 conn=Wye model=1 kv=0.220000000 kw=3.5 pf=1 status=variable vmaxpu=1.5 vminpu=0.92
New "Load.LDV_BT_1039395_7_M1_IJAU11_1001039395_003040" bus1="1001039395.1.2.3.4" phases=3 conn=Delta model=1 kv=0.220000000 kw=3.5 pf=1 status=variable vmaxpu=1.5 vminpu=0.92
New "Load.LDV_BT_1016855_M1_IJAU11_1001016855_001482" bus1="1001016855.1.4" phases=1 conn=Wye model=1 kv=0.220000000 kw=3.5 pf=1 status=variable vmaxpu=1.5 vminpu=0.92
New "Load.LDV_BT_1018437_2_M1_IJAU11_1001018437_001753" bus1="1001018437.1.2.3.4" phases=3 conn=Delta model=1 kv=0.220000000 kw=3.5 pf=1 status=variable vmaxpu=1.5 vminpu=0.92
New "Load.TW_BT_994616_M1_IJAU11_1000994616_005359" bus1="1000994616.1.2.3.4" phases=3 conn=Delta model=1 kv=0.220000000 kw=2.0 pf=1 status=variable vmaxpu=1.5 vminpu=0.92
New "Load.TW_BT_1024576_2_M1_IJAU11_1001024576_002446" bus1="1001024576.1.2.4" phases=1 conn=Delta model=1 kv=0.240000000 kw=2.0 pf=1 status=variable vmaxpu=1.5 vminpu=0.92
New "Load.TW_BT_4828124_M1_IJAU11_1004828124_004734" bus1="1004828124.1.2.4" phases=1 conn=Delta model=1 kv=0.220000000 kw=2.0 pf=1 status=variable vmaxpu=1.5 vminpu=0.92
New "Load.TW_BT_1235913_1_M1_IJAU11_1001235913_003984" bus1="1001235913.1.2.3.4" phases=3 conn=Delta model=1 kv=0.220000000 kw=2.0 pf=1 status=variable vmaxpu=1.5 vminpu=0.92
