New "Load.LDV_BT_996891_M1_IJAU15_1000996891_008716" bus1="1000996891.2.4" phases=1 conn=Wye model=1 kv=0.220000000 kw=3.5 pf=1 status=variable vmaxpu=1.5 vminpu=0.92
New "Load.LDV_BT_970683_2_M1_IJAU15_1000970683_007056" bus1="1000970683.3.1.4" phases=1 conn=Delta model=1 kv=0.220000000 kw=3.5 pf=1 status=variable vmaxpu=1.5 vminpu=0.92
New "Load.LDV_BT_1133699_M1_IJAU15_1001133699_002769" bus1="1001133699.3.4" phases=1 conn=Wye model=1 kv=0.220000000 kw=3.5 pf=1 status=variable vmaxpu=1.5 vminpu=0.92
New "Load.LDV_BT_998172_M1_IJAU15_1000998172_008874" bus1="1000998172.1.4" phases=1 conn=Wye model=1 kv=0.220000000 kw=3.5 pf=1 status=variable vmaxpu=1.5 vminpu=0.92
New "Load.LDV_BT_1185758_M1_IJAU15_1001185758_003453" bus1="1001185758.2.4" phases=1 conn=Wye model=1 kv=0.220000000 kw=3.5 pf=1 status=variable vmaxpu=1.5 vminpu=0.92
New "Load.TW_BT_3673950_M1_IJAU15_1003673950_004776" bus1="1003673950.1.2.4" phases=1 conn=Delta model=1 kv=0.220000000 kw=2.0 pf=1 status=variable vmaxpu=1.5 vminpu=0.92
New "Load.TW_BT_981232_M1_IJAU15_1000981232_007903" bus1="1000981232.3.4" phases=1 conn=Wye model=1 kv=0.220000000 kw=2.0 pf=1 status=variable vmaxpu=1.5 vminpu=0.92
New "Load.TW_BT_1133174_1_M1_IJAU15_1001133174_002654" bus1="1001133174.2.4" phases=1 conn=Wye model=1 kv=0.220000000 kw=2.0 pf=1 status=variable vmaxpu=1.5 vminpu=0.92
New "Load.TW_BT_1132726_M1_IJAU15_1001132726_002576" bus1="1001132726.1.4" phases=1 conn=Wye model=1 kv=0.220000000 kw=2.0 pf=1 status=variable vmaxpu=1.5 vminpu=0.92
